Plane
0.700000
0 0 0.0
105.000000 3.750000 28.000000
0.50 0.0 0.0

SURFACE
MainWing
10 1.0 22 -2.0
COMPONENT
1
YDUPLICATE
0.0
ANGLE
0.0
SECTION
0. 0. 0. 5.5 0.0 0 0
CLAF
1.0
SECTION
3.5 14.0 0.0 2.0 0.0 0 0
CLAF
1.0

SURFACE
Winglet
8 1.0 22 1.0
COMPONENT
1
YDUPLICATE
0.0
ANGLE
0.0
SECTION
3.768395 14.0 0.0 1.731605 -0.011537 0 0
CLAF
1.0
SECTION
7.445350 16.600000 0.000000 1.477478 -0.005959 0.0 0
CLAF
1.0
