Plane
0.700000
0 0 0.0
105.000000 3.750000 28.000000
0.50 0.0 0.0

SURFACE
MainWing
12 1.0 30 -2.0
COMPONENT
1
YDUPLICATE
0.0
ANGLE
0.0
SECTION
0. 0. 0. 5.5 0.0 0 0
CLAF
1.0
SECTION
3.5 14.0 0.0 2.0 0.0 0 0
CLAF
1.0

SURFACE
Winglet
10 1.0 20 1.0
COMPONENT
1
YDUPLICATE
0.0
ANGLE
0.0
SECTION
4.074945 14.0 0.0 1.425055 0.005570 0 0
CLAF
1.0
SECTION
4.074945 16.496263 0.402656 0.575478 0.003750 0.0 0
CLAF
1.0
